R1 := 12*10^3
R2 := 10^3
C := 0.1*10^-7
K(F) := sqrt(((1 + C^2*(2*π*F)^2*R1*R2 - C^2*(2*π*F)^2*R2^2)/(1 + (C*2*π*F*R1 + C*2*π*F*R2)^2))^2 + ((2*C*2*π*F*R2 - C*2*π*F*R1)/(1 + (C*2*π*F*R1 + C*2*π*F*R2)^2))^2)
U(F) := atan((2*C*2*π*F*R2 - C*2*π*F*R1)/(1 + (C*2*π*F*R1 + C*2*π*F*R2)^2)/((1 + C^2*(2*π*F)^2*R1*R2 - C^2*(2*π*F)^2*R2^2)/(1 + (C*2*π*F*R1 + C*2*π*F*R2)^2)))
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